## Параметры транзистора
## Задание
β_0 := 50
U_к.доп := 12  # В
E_б0 := 0.25  # В
f_г := 4
r_б := 60
S_гр := 0.05
f_т := 500
## Параметры угла отсечки
θ := 80
α_0 := 0.286
## Параметры кварцевого резонатора
α_1 := 0.472
f_кв := 3.999931*10^6  # Гц
C_0 := 4*10^-12  # Ф
R_кв := 44  # Ом
Q_кв := 58000
P_кв := 0.2*10^-3  # Вт
## =================РАСЧЁТ===================
# Максимальная амплитуда импульса коллекторного тока
i_кm_max := sqrt(2*P_кв/(α_1^2*R_кв)) = 0.00638795  # А
i_кm := 5*10^-3  # А
# Первая гармоника коллекторного тока | Постоянная составляющая коллекторного тока
I_к1 := i_кm*α_1 = 0.00236  # А
I_к0 := i_кm*α_0 = 0.00143  # А
# Определяем параметры крутизны
S_0 := 15*β_0*i_кm/(15*i_кm*r_б + β_0) = 0.0688073  # А / В
S_1.0 := S_0*α_1*(1 - cos(θ)) = 0.0360621  # А / В
f_s := f_т/(S_0*r_б) = 121.111  # Фазовый угол крутизны
φ_s := -atan(f_г/f_s) = -0.0330155
S_1 := S_1.0*cos(φ_s) = 0.0360425
# Амплитуда первой гармоники напряжения на базе
U_б := I_к1/S_1 = 0.0654783  # В
# Сопротивление резистора в эмиттерной цепи
R4 := U_б/(sqrt(2*P_кв/R_кв) - i_кm*α_1) = 99.9496
R_эм := R4/(1 + S_1*R4) = 21.7167
R'_эк := 0.25*R_кв = 11
# Параметр А
A := S_1*R_эм*R'_эк/(R_кв + R_эм + R'_эк) = 0.112231
# Отношение емкостей
K := A/(1 - A) = 0.126419
# Эквивалентное сопротивление контура
R_ЭК := R'_эк*(1 + K)^2/K^2 = 873.314
# Задаёмся добротностью конутра
Q_к := 50
## Параметры колебательной системы
ρ_к := R_ЭК/Q_к = 17.4663
C_к := 1/(2*π*ρ_к*f_кв) = 2.27807e-9  # Ф
L_к := ρ_к/(2*π*f_кв) = 6.94973e-7  # Гн
C_2 := C_к*(1 + K)/K = 2.02981e-8  # Ф
C_1 := K*C_2 = 2.56606e-9  # Ф
# Индуктивность, нейтрализующая ёмкость кварцедержателя
L_0 := 1/((2*π*f_кв)^2*C_0) = 0.0003958  # Гн
## Энергетические параметры автогенератора
# 1. Параметр δ1
δ_1 := ((1 + K)/K)^2*(R_кв + R_эм)/R_ЭК = 5.97425
# 2. Сопротивление коллекторной нагрузки
R_кн := R_ЭК/((1 + K)^2*(1 + 1/δ_1^2)) = 669.53  # Ом
# 3. Амплитуда напряжения на коллекторе
U_к := i_кm*R_кн*α_1 = 1.58009  # В
## Параметры усилителя
# Проверка недонапряжённого режима
E_к := 0.5*U_к.доп = 6
U_к.гр := E_к - i_кm/S_гр = 5.9
U_к.гр > U_к → 1  # УРА!  # --> Проверка пройдена
# Расчёт мощности, потребляемой от источника напряжения
P_0 := I_к0*E_к = 0.00858  # Вт
# Расчёт мощности, отдаваемой транзистором
P_отдал := 0.5*U_к*i_кm*α_0 = 0.00112977  # Вт
# Расчёт мощности, рассеиваемой на коллекторе
P_к := P_0 - P_отдал = 0.00745023  # Вт
P_к2 := P_0 - P_кв = 0.00838
# Коэффициент полезного действия коллекторной цепи
η := P_кв/P_0 = 0.02331
## --Расчёт делителя--
# Постоянная составляющая тока базы
I_б0 := i_кm*α_0/β_0 = 2.86e-5  # А
# Напряжение смещения на базе
E_б := -U_б*cos(θ) + E_б0 = 0.257228  # В
